Simulations: Version=2
  Replacements
    Plant Wheat: CropType=Wheat
      Memo TitlePage
        # The APSIM Wheat Model

        _Brown, H.E., Huth, N.I. and Holzworth, D.P._

        The APSIM wheat model has been developed using the Plant Modelling Framework (PMF) of [brown_plant_2014]. This new framework provides a library of plant organ and process submodels that can be coupled, at runtime, to construct a model in much the same way that models can be coupled to construct a simulation. This means that dynamic composition of lower level process and organ classes (e.g. photosynthesis, leaf) into larger constructions (e.g. maize, wheat, sorghum) can be achieved by the model developer without additional coding.

        The model consists of:

        * a phenology model to simulate development between growth phases
        * a structure model to simulate plant morphology
        * a collection of organs to simulate the various plant parts
        * an arbitrator to allocate resources (N, biomass) to the various plant organs
      OrganArbitrator Arbitrator: NArbitrationOption=RelativeAllocation; DMArbitrationOption=RelativeAllocation
      Phenology: DaysAfterSowing=0
        MultiplyFunction ThermalTime
          PhaseLookup Temperature
            PhaseLookupValue SoilTemperature: Start=Sowing; End=TerminalSpikelet
              AirTemperatureFunction AirThermalTime
                XYPairs: X=[0, 26, 37]; Y=[0, 26, 0]
            PhaseLookupValue AirTemperature: Start=TerminalSpikelet; End=HarvestRipe
              AirTemperatureFunction AirThermalTime
                XYPairs: X=[0, 26, 37]; Y=[0, 26, 0]
          AddFunction DroughtPhenologyAcelleration
            Constant One: Value=1
            MultiplyFunction Stress
              Constant StressResponseCoefficient: Value=2
              LinearInterpolationFunction StressFactor: XProperty=[Wheat].WaterSupplyDemandRatio
                XYPairs: X=[0, 1]; Y=[0, 0]
        AccumulateFunction AccumulateThermalTime: StartStageName=Sowing; EndStageName=HarvestRipe
          VariableReference: VariableName=[Phenology].ThermalTime.Value
        GerminatingPhase Germinating: Start=Sowing; End=Germination
        EmergingPhase Emerging: Start=Germination; End=Emergence; ShootLag=40; ShootRate=1.5
          VariableReference ThermalTime: VariableName=[Phenology].ThermalTime.Value
        GenericPhase Vegetative: Start=Emergence; End=TerminalSpikelet
          Constant Target: Value=401
          VariableReference ThermalTime: VariableName=[Phenology].ThermalTime.Value
          MinimumFunction Stress
            VariableReference VernalisationEffect: VariableName=[Phenology].Vernalisation.VernEff
            VariableReference PhotoperiodEffect: VariableName=[Phenology].Vernalisation.PhotopEff
        LeafAppearancePhase StemElongation: Start=TerminalSpikelet; End=FlagLeaf
          VariableReference ThermalTime: VariableName=[Phenology].ThermalTime.Value
        GenericPhase EarlyReproductive: Start=FlagLeaf; End=Flowering
          LinearInterpolationFunction ThermalTime: XProperty=[Vernalisation].CrownTemperature
            XYPairs: X=[0, 26, 34]; Y=[0, 26, 0]
          MultiplyFunction Target
            Constant Multiplier: Value=3
            VariableReference Phyllochron
              VariableName=[Structure].MainStemNodeAppearanceRate.BasePhyllochron.Value
        GenericPhase GrainDevelopment: Start=Flowering; End=StartGrainFill
          Constant Target: Value=120
          VariableReference ThermalTime: VariableName=[Phenology].ThermalTime.Value
        GenericPhase GrainFilling: Start=StartGrainFill; End=EndGrainFill
          Constant Target: Value=545
          VariableReference ThermalTime: VariableName=[Phenology].ThermalTime.Value
        GenericPhase Maturing: Start=EndGrainFill; End=Maturity
          Constant Target: Value=35
          VariableReference ThermalTime: VariableName=[Phenology].ThermalTime.Value
        GenericPhase Ripening: Start=Maturity; End=HarvestRipe
          Constant Target: Value=300
          VariableReference ThermalTime: VariableName=[Phenology].ThermalTime.Value
        EndPhase ReadyForHarvesting: Start=HarvestRipe; End=Unused
          VariableReference ThermalTime: VariableName=[Phenology].ThermalTime.Value
        PhotoperiodFunction Photoperiod: Twilight=-6
        VernalisationCW Vernalisation: VernSens=2.5; PhotopSens=2; StartStageForEffects=Emergence; EndStageForEffects=TerminalSpikelet; StartStageForCumulativeVD=Germination; EndStageForCumulativeVD=TerminalSpikelet
          AirTemperatureFunction VDModel
            XYPairs: X=[0, 2, 15]; Y=[0, 1, 0]
          PhotoperiodFunction Photoperiod: Twilight=-6
        ZadokPMF Zadok
      Structure: Initialised=false; Germinated=false; Emerged=false
        PhaseLookup MainStemPrimordiaInitiationRate
          PhaseLookupValue VegetativePrimordiaInitiationRate: Start=Emergence; End=TerminalSpikelet
            DivideFunction RelativeToPyllochron
              VariableReference Phyllochron
                VariableName=[Structure].MainStemNodeAppearanceRate.BasePhyllochron.Value
              Constant PrimordiaPerMainstemNode: Value=1.1
          Memo Rational
            [Brown_Anthesis_2013] showed final leaf number (FLN) could be estimated as 2.86 + HSTS * 1.1 where HS<sup>TS</sup> is the the Haun stage at terminal spikelet.  To caputre this in the wheat model we have set the initial number of primordia (determined by the number of initialleaf objects on the leaf class) to 3 and have set this function to produce primordia 10% faster than mainstem leaves.  Primordia are initiated until the therminal spikelet stage and then the number remains fixed, giving final leaf number.
        MultiplyFunction MainStemNodeAppearanceRate
          LinearInterpolationFunction LeafStageFactor: XProperty=[Structure].LeafTipsAppeared
            XYPairs: X=[0, 2, 3, 7, 8, 14]; Y=[0.6, 0.6, 1, 1, 1.3, 1.3]
          Constant BasePhyllochron: Value=100
          Memo Rational
            Based on [Jamieson_SIRIUS_1998] where leaf appearace could be described by a base phyllochron determined between leaves 2 and 7 and a phyllochron that was 70% of base phyllochron for leaves < 2 and 130% of base phyllochron for leaves > 7
        HeightFunction HeightModel
          LinearInterpolationFunction PotentialHeight: XProperty=[Phenology].Stage
            XYPairs: X=[3, 4, 5, 6, 7]; Y=[10, 200, 1000, 1100, 1200]
          LinearInterpolationFunction WaterStress: XProperty=[Wheat].WaterSupplyDemandRatio
            XYPairs: X=[0.3, 1]; Y=[0, 1]
        MultiplyFunction BranchingRate
          PhaseLookup PotentialBranchingRate
            PhaseLookupValue Vegetative: Start=Emergence; End=TerminalSpikelet
              LessThanFunction
                VariableReference: VariableName=[Leaf].CoverGreen
                Constant ThresholdCoverage: Value=0.7
                LinearInterpolationFunction PotentialBranchingRate: XProperty=[Leaf].AppearedCohortNo
                  XYPairs: X=[1, 2, 3, 4, 5, 6, 7]; Y=[0, 0, 1, 1, 2, 2, 3]
                Constant Zero: Value=0
            PhaseLookupValue Reproductive: Start=TerminalSpikelet; End=HarvestRipe
              Constant Zero: Value=0
          MinimumFunction StressFactors
            LinearInterpolationFunction WSC: XProperty=[Stem].PercentWSC.Value
              XYPairs: X=[0.1, 0.2]; Y=[1, 1]
            LinearInterpolationFunction Nitrogen: XProperty=[Arbitrator].FN
              XYPairs: X=[0, 1.5, 2]; Y=[0, 1, 1]
        VariableReference ThermalTime: VariableName=[Phenology].ThermalTime.Value
        Constant MaximumMainStemNodeNumber: Value=18
        MovingAverageFunction MeanTillerGrowthRate: NumberOfDays=5; InitialValue=0
          DivideFunction TillerGrowthRate
            VariableReference DailyGrowth: VariableName=[Arbitrator].DMSupply
            VariableReference ThermalTime: VariableName=[Phenology].ThermalTime.Value
            VariableReference StemPopulation: VariableName=[Structure].TotalStemPopn
        PhaseLookup BranchMortality
          PhaseLookupValue MortalityPhase: Start=TerminalSpikelet; End=Flowering
            LinearInterpolationFunction Mortality: XProperty=[Structure].MeanTillerGrowthRate.Value
              XYPairs: X=[0, 0.004, 0.005]; Y=[0.07, 0, 0]
        HoldFunction MainStemFinalNodeNumber: WhenToHold=TerminalSpikelet
          AddFunction ValueToHold
            MultiplyFunction LeafTipAppeared
              VariableReference LeafTipAppeared: VariableName=[Structure].LeafTipsAppeared
              Constant: Value=1.1
            Constant: Value=2.58
      ReproductiveOrgan Grain: MaintenanceRespiration=0; RipeStage=Ripe; GrowthRespiration=0
        Biomass Live
        Biomass Dead
        Constant MaxNConcDailyGrowth: Value=0.03
        Constant WaterContent: Value=0.12
        Constant MinimumNConc: Value=0.006
        Constant MaximumNConc: Value=0.03
        Constant MaximumPotentialGrainSize: Value=0.043; Units=g
        PhaseBasedSwitch NitrogenDemandSwitch: Start=Germination; End=Maturity
        AccumulateFunction AccumThermalTime: StartStageName=Flowering; EndStageName=Maturity
          VariableReference DailyThermalTimeValue: VariableName=[Phenology].ThermalTime.Value
        AirTemperatureFunction FillingRate
          XYPairs: X=[0, 26, 30, 35]; Y=[0, 0.0015, 0.0015, 0.0015]
        PhaseLookup DMDemandFunction
          PhaseLookupValue InitialPhase: Start=Flowering; End=StartGrainFill
            FillingRateFunction
              VariableReference GrainNumber: VariableName=[Grain].NumberFunction.Value
              VariableReference FillingDuration: VariableName=[Phenology].GrainDevelopment.Target.Value
              VariableReference ThermalTime: VariableName=[Phenology].ThermalTime.Value
              MultiplyFunction PotentialSizeIncrement
                VariableReference InitialProportion: VariableName=[Grain].InitialGrainProportion.Value
                VariableReference MaximumSize: VariableName=[Grain].MaximumPotentialGrainSize.Value
          PhaseLookupValue LinearPhase: Start=StartGrainFill; End=EndGrainFill
            FillingRateFunction
              VariableReference GrainNumber: VariableName=[Grain].NumberFunction.Value
              VariableReference FillingDuration: VariableName=[Phenology].GrainFilling.Target.Value
              VariableReference ThermalTime: VariableName=[Phenology].ThermalTime.Value
              MultiplyFunction PotentialSizeIncrement
                SubtractFunction ProportionLinearPhase
                  Constant One: Value=1
                  VariableReference InitialProportion: VariableName=[Grain].InitialGrainProportion.Value
                VariableReference MaximumSize: VariableName=[Grain].MaximumPotentialGrainSize.Value
        MultiplyFunction NumberFunction
          Constant GrainsPerStem: Value=25; Units=/g
          VariableReference StemMass: VariableName=[StemPlusSpike].Wt
        ExpressionFunction Protein
          Expression=([Grain].Live.N + [Grain].Dead.N)/([Grain].Live.Wt + [Grain].Dead.Wt) * 100 * 5.71
        DivideFunction GrowthRateGrainDevelopment
          AccumulateFunction GrowthGrainDevelopment: StartStageName=FlagLeaf; EndStageName=StartGrainFill
            VariableReference DailyBiomassProduction: VariableName=[Arbitrator].DMSupply
          AccumulateFunction DaysGrainDevelopment: StartStageName=FlagLeaf; EndStageName=StartGrainFill
            Constant LenthOfADay: Value=1; Units=days/day
        Constant InitialGrainProportion: Value=0.05
        PhaseLookup NFillingRate
          PhaseLookupValue GrainFilling: Start=Flowering; End=EndGrainFill
            FillingRateFunction
              VariableReference GrainNumber: VariableName=[Grain].NumberFunction.Value
              AddFunction FillingDuration
                VariableReference FloweringToGrainFilling: VariableName=[Phenology].GrainDevelopment.Target.Value
                VariableReference GrainFilling: VariableName=[Phenology].GrainFilling.Target.Value
              VariableReference ThermalTime: VariableName=[Phenology].ThermalTime.Value
              MultiplyFunction PotentialSizeIncrement
                Constant MaximumFinalNConc: Value=0.026; Units=g/g
                VariableReference MaximumSize: VariableName=[Grain].MaximumPotentialGrainSize.Value
        Folder BiomassRemovalDefaults
          OrganBiomassRemovalType Harvest: FractionLiveToRemove=0; FractionDeadToRemove=0; FractionLiveToResidue=0; FractionDeadToResidue=0
          OrganBiomassRemovalType Cut: FractionLiveToRemove=0; FractionDeadToRemove=0; FractionLiveToResidue=0; FractionDeadToResidue=0
          OrganBiomassRemovalType Prune: FractionLiveToRemove=0; FractionDeadToRemove=0; FractionLiveToResidue=0; FractionDeadToResidue=0
          OrganBiomassRemovalType Graze: FractionLiveToRemove=0; FractionDeadToRemove=0; FractionLiveToResidue=0; FractionDeadToResidue=0
          OrganBiomassRemovalType Thin: FractionLiveToRemove=0; FractionDeadToRemove=0; FractionLiveToResidue=0; FractionDeadToResidue=0
      Root: MaintenanceRespiration=0; NuptakeSupply=0
        CompositeBiomass Live: Propertys=[[Root].LayerLive]
        CompositeBiomass Dead: Propertys=[[Root].LayerDead]
        LinearInterpolationFunction KLModifier: XProperty=[Leaf].LAI
          XYPairs: X=[0, 3]; Y=[1, 1]
        Constant SoilWaterEffect: Value=1
        AirTemperatureFunction TemperatureEffect
          XYPairs: X=[0, 26, 35]; Y=[1, 1, 1]
        Constant MaxDailyNUptake: Value=20
        Constant SenescenceRate: Value=0.005
        Constant StructuralFraction: Value=1
        PhaseLookup PartitionFraction
          PhaseLookupValue PreEmergence: Start=Germination; End=Emergence
            Constant Value: Value=0
          PhaseLookupValue PreFlowering: Start=Emergence; End=Flowering
            Constant Value: Value=0.2
          PhaseLookupValue PostFlowering: Start=Emergence; End=Flowering
            Constant Value: Value=0
        Constant MaximumNConc: Value=0.01
        Constant MinimumNConc: Value=0.01
        PhaseLookup RootFrontVelocity
          PhaseLookupValue PreEmergence: Start=Germination; End=Emergence
            Constant Value: Value=5
          PhaseLookupValue PostEmergence: Start=Emergence; End=Maturity
            Constant Value: Value=20
        PhaseBasedSwitch NitrogenDemandSwitch: Start=Germination; End=Maturity
        Folder BiomassRemovalDefaults: same as Replacements.Wheat.Grain.BiomassRemovalDefaults
        LinearInterpolationFunction KNO3: XProperty=[Root].RootLengthDenisty
          XYPairs: X=[0, 0.003]; Y=[0.03, 0.03]
        LinearInterpolationFunction KNH4: XProperty=[Root].RootLengthDenisty
          XYPairs: X=[0, 0.003]; Y=[0.03, 0.03]
        LinearInterpolationFunction NUptakeSWFactor: XProperty=[Root].RWC
          XYPairs: X=[0, 0.2, 1]; Y=[1, 1, 1]
        Constant InitialDM: Value=0.2; Units=g/plant
        Constant SpecificRootLength: Value=40; Units=m/g
      Leaf: MaxCover=1; Albedo=0.2; Gsmax=0.015; R50=150; KDead=0.3; MaximumMainStemLeafNumber=30
        zero: MaintenanceRespiration, CurrentExpandingLeaf, StartFractionExpanded, FractionNextleafExpanded, DeadNodesYesterday, FRGR, PotentialEP, FudgeToGetETDemandRight, DMConversionEfficiency, GrowthRespiration, TipsAtEmergence, CohortsAtInitialisation, FractionDied
        LeafCohort InitialLeaves[1]: DeltaWaterConstrainedArea=0; DeltaCarbonConstrainedArea=0; Rank=1; Area=200; MaintenanceRespiration=0
        LeafCohort InitialLeaves[2]: DeltaWaterConstrainedArea=0; DeltaCarbonConstrainedArea=0; Rank=2; Area=0; MaintenanceRespiration=0
        LeafCohort InitialLeaves[3]: DeltaWaterConstrainedArea=0; DeltaCarbonConstrainedArea=0; Rank=3; Area=0; MaintenanceRespiration=0
        CompositeBiomass Live: Propertys=[[Leaf].CohortLive]
        CompositeBiomass Dead: Propertys=[[Leaf].CohortDead]
        ArrayBiomass CohortArrayLive: Propertys=[[Leaf].Live]; ArraySize=[Leaf].MaxNodeNo
        ArrayBiomass CohortArrayDead: Propertys=[[Leaf].Dead]; ArraySize=[Leaf].MaxNodeNo
        LeafCohortParameters CohortParameters
          Constant NReallocationFactor: Value=0.3
          Constant NRetranslocationFactor: Value=0.1
          Constant DMReallocationFactor: Value=0
          Constant DMRetranslocationFactor: Value=0
          MinimumFunction CellDivisionStress
            LinearInterpolationFunction WaterStressFactor: XProperty=[Wheat].WaterSupplyDemandRatio
              XYPairs: X=[0.5, 1]; Y=[0.1, 1]
            LinearInterpolationFunction NitrogenStressFactor: XProperty=[Wheat].Leaf.Fn
              XYPairs: X=[0, 0.5, 1]; Y=[1, 1, 1]
              Constant DMReallocationFactor: Value=0
          LinearInterpolationFunction ExpansionStress: XProperty=[Wheat].WaterSupplyDemandRatio
            XYPairs: X=[0.1, 0.7, 1]; Y=[0, 1, 1]
          VariableReference GrowthDuration: VariableName=[Structure].MainStemNodeAppearanceRate.Value
          PhaseLookup LagDuration
            PhaseLookupValue VegetativeGrowth: Start=Emergence; End=TerminalSpikelet
              MultiplyFunction LagDuration
                Constant Multiplier: Value=4
                VariableReference Phyllochron: VariableName=[Structure].MainStemNodeAppearanceRate.Value
            PhaseLookupValue StemElongation: Start=TerminalSpikelet; End=FlagLeaf
              ExpressionFunction LagDuration
                Expression=[Phenology].GrainFilling.Target.Value+[Phenology].GrainDevelopment.Target.Value + [Phenology].EarlyReproductive.Target.Value - [Leaf].CohortParameters.SenescenceDuration.Value
          MultiplyFunction SenescenceDuration
            Constant Multiplier: Value=3
            VariableReference Phyllochron: VariableName=[Structure].MainStemNodeAppearanceRate.Value
          Constant DetachmentLagDuration: Value=1000000
          Constant DetachmentDuration: Value=1000000
          Constant RelativeBranchLeafSize: Value=1
          LinearInterpolationFunction MaximumNConc: XProperty=[Phenology].Stage
            XYPairs: X=[3, 4, 6]; Y=[0.08, 0.05, 0.02]
          LinearInterpolationFunction CriticalNConc: XProperty=[Phenology].Stage
            XYPairs: X=[3, 4, 6]; Y=[0.07, 0.04, 0.015]
          LinearInterpolationFunction MinimumNConc: XProperty=[Phenology].Stage
            XYPairs: X=[3, 4]; Y=[0.01, 0.005]
          AddFunction DroughtInducedSenAcceleration
            Constant One: Value=1
            MultiplyFunction Stress
              Constant StressResponseCoefficient: Value=1
              LinearInterpolationFunction StressFactor: XProperty=[Wheat].WaterSupplyDemandRatio
                XYPairs: X=[0, 0.7]; Y=[1, 0]
          LinearInterpolationFunction SpecificLeafAreaMax: XProperty=[Phenology].Stage
            XYPairs: X=[3, 4]; Y=[18000, 30000]
          LinearInterpolationFunction SpecificLeafAreaMin: XProperty=[Leaf].Fn
            XYPairs: X=[0.4, 1]; Y=[10000, 18000]
          Constant InitialNConc: Value=0
          Constant StructuralFraction: Value=0.5
          Constant NonStructuralFraction: Value=0
          LinearInterpolationFunction ShadeInducedSenescenceRate: XProperty=[Leaf].CohortCurrentRankCoverAbove
            XYPairs: X=[0, 0.7, 0.8, 0.97, 0.98]; Y=[0, 0, 0, 0, 0]
          Constant LeafSizeShapeParameter: Value=0.3
          Constant SenessingLeafRelativeSize: Value=0.1; Units=0-1
          PhaseLookup MaxArea
            PhaseLookupValue VegetativeGrowth: Start=Emergence; End=TerminalSpikelet
              LinearInterpolationFunction MaxAreaVeg: XProperty=[Structure].LeafTipsAppeared
                XYPairs: X=[1, 3, 12]; Y=[100, 500, 5000]
            PhaseLookupValue StemElongation: Start=TerminalSpikelet; End=FlagLeaf
              AddFunction MaxAreaStem
                LinearInterpolationFunction MaxAreaVeg: XProperty=[Leaf].CohortParameters.LeafRankAfterTerminalSpikelet.Value
                  XYPairs: X=[1, 3]; Y=[0, 0]
                OnEventFunction LeafSizeAtTerminalSpikelet: SetEvent=TerminalSpikelet
                  VariableReference PreEventValue: VariableName=[Leaf].AreaLargestLeaf
                  VariableReference PostEventValue: VariableName=[Leaf].AreaLargestLeaf
          OnEventFunction LeafNumberAtTerminalSpikelet: SetEvent=TerminalSpikelet
            Constant PreEventValue: Value=0
            VariableReference PostEventValue: VariableName=[Structure].LeafTipsAppeared
          ExpressionFunction LeafRankAfterTerminalSpikelet
            Expression=[Structure].LeafTipsAppeared - [Leaf].CohortParameters.LeafNumberAtTerminalSpikelet.Value
        RUEModel Photosynthesis
          Constant RUE: Value=1.5
          WeightedTemperatureFunction FT: MaximumTemperatureWeighting=0.5
            XYPairs: X=[0, 10, 25, 35]; Y=[0, 1, 1, 0]
          LinearInterpolationFunction FVPD: XProperty=[Leaf].Photosynthesis.VPD
            XYPairs: X=[0, 10, 50]; Y=[1, 1, 1]
          LinearInterpolationFunction FN: XProperty=[Leaf].Fn
            XYPairs: X=[0, 1, 1.5]; Y=[0, 1, 1]
          LinearInterpolationFunction FW: XProperty=[Leaf].Fw
            XYPairs: X=[0, 1]; Y=[0, 1]
          RUECO2Function FCO2: PhotosyntheticPathway=C3
          VariableReference RadnInt: VariableName=[Leaf].RadIntTot
        MultiplyFunction ExtinctionCoeff
          LinearInterpolationFunction PotentialExtinctionCoeff: XProperty=[Leaf].LAI
            XYPairs: X=[0, 0.5]; Y=[0.5, 0.5]
          LinearInterpolationFunction WaterStress: XProperty=[Wheat].WaterSupplyDemandRatio
            XYPairs: X=[0, 0.7]; Y=[0.5, 1]
        LinearInterpolationFunction FrostFraction: XProperty=[Weather].MinT
          XYPairs: X=[-1, 0]; Y=[0, 0]
        VariableReference ThermalTime: VariableName=[Phenology].ThermalTime.Value
        MinimumFunction FRGRFunction
          VariableReference RUE_FT: VariableName=[Leaf].Photosynthesis.FT.Value
          MinimumFunction Others
            VariableReference RUE_FN: VariableName=[Leaf].Photosynthesis.FN.Value
            VariableReference RUE_FVPD: VariableName=[Leaf].Photosynthesis.FVPD.Value
        Folder BiomassRemovalDefaults: same as Replacements.Wheat.Grain.BiomassRemovalDefaults
      GenericAboveGroundOrgan Spike: MaintenanceRespiration=0; GrowthRespiration=0
        PopulationBasedDemandFunction DMDemandFunction
          VariableReference ThermalTime: VariableName=[Phenology].ThermalTime.Value
          Constant ExpansionStress: Value=1
          VariableReference OrganPopulation: VariableName=[Spike].HeadNumber.Value
          Constant StartStage: Value=5.2
          Constant MaximumOrganWt: Value=0.4
          Constant GrowthDuration: Value=453
        Biomass Live
        Biomass Dead
        Constant NReallocationFactor: Value=0
        Constant NRetranslocationFactor: Value=0.1
        Constant MaximumNConc: Value=0.01
        Constant StructuralFraction: Value=0.7
        Constant MinimumNConc: Value=0.003
        MultiplyFunction HeadNumber
          Constant FertileTillers: Value=1
          VariableReference StemPopulation: VariableName=[Structure].TotalStemPopn
        Folder BiomassRemovalDefaults: same as Replacements.Wheat.Grain.BiomassRemovalDefaults
      GenericAboveGroundOrgan Stem: MaintenanceRespiration=0; GrowthRespiration=0
        Biomass Live
        Biomass Dead
        Constant StructuralFraction: Value=0.7
        LinearInterpolationFunction MaximumNConc: XProperty=[Phenology].Stage
          XYPairs: X=[3, 4, 6]; Y=[0.07, 0.03, 0.015]
        LinearInterpolationFunction MinimumNConc: XProperty=[Phenology].Stage
          XYPairs: X=[3, 4, 6]; Y=[0.015, 0.01, 0.0025]
        PhaseBasedSwitch NitrogenDemandSwitch: Start=Emergence; End=StartGrainFill
        Constant NReallocationFactor: Value=0
        Constant NRetranslocationFactor: Value=0.5
        PhaseLookup DMRetranslocationFactor
          PhaseLookupValue VegetativeGrowth: Start=Emergence; End=Flowering
            Constant DMRetranslocationFactor: Value=0
          PhaseLookupValue ReproductiveGrowth: Start=Flowering; End=EndGrainFill
            Constant DMRetranslocationFactor: Value=0.5
        PartitionFractionDemandFunction DMDemandFunction
          PhaseLookup PartitionFraction
            PhaseLookupValue PreStemElongation: Start=Emergence; End=TerminalSpikelet
              Constant StemFraction: Value=0.4
            PhaseLookupValue StemElongation: Start=TerminalSpikelet; End=Flowering
              Constant StemFraction: Value=0.6
        Folder BiomassRemovalDefaults: same as Replacements.Wheat.Grain.BiomassRemovalDefaults
        DivideFunction PercentWSC
          VariableReference WSC: VariableName=[Stem].Live.NonStructuralWt
          VariableReference StemWt: VariableName=[Stem].Live.Wt
      CompositeBiomass AboveGround
        Propertys=[[Leaf].Live, [Leaf].Dead, [Stem].Live, [Stem].Dead, [Spike].Live, [Spike].Dead, [Grain].Live, [Grain].Dead]
      CompositeBiomass BelowGround: Propertys=[[Root].Live, [Root].Dead]
      CompositeBiomass Total
        Propertys=[[Leaf].Live, [Leaf].Dead, [Stem].Live, [Stem].Dead, [Root].Live, [Root].Dead, [Spike].Live, [Spike].Dead, [Grain].Live, [Grain].Dead]
      CompositeBiomass TotalLive
        Propertys=[[Leaf].Live, [Stem].Live, [Root].Live, [Spike].Live, [Grain].Live]
      CompositeBiomass TotalDead
        Propertys=[[Leaf].Dead, [Stem].Dead, [Root].Dead, [Spike].Dead, [Grain].Dead]
      CompositeBiomass AboveGroundLive: Propertys=[[Leaf].Live, [Stem].Live, [Spike].Live, [Grain].Live]
      CompositeBiomass EarLive: Propertys=[[Spike].Live, [Grain].Live]
        Memo
          The EarLive composite biomass object includes the Live pools of all organs within the Ear to allow output for total dry matter and Nutrient contents, including total structural, non-structural and metabolic pools.
      CompositeBiomass StemPlusSpike: Propertys=[[Stem].Live, [Spike].Live, [Stem].Dead, [Spike].Dead]
      CultivarFolder Cultivars
        CultivarFolder New Zealand
          Cultivar Alberic
            Command:
              [Phenology].Vernalisation.VernSens = 3.0
              [Phenology].Vernalisation.PhotopSens = 5
          Cultivar Amarok
            Command:
              [Phenology].Vernalisation.VernSens = 3.0
              [Phenology].Vernalisation.PhotopSens = 4.0
          Cultivar Aspiring
            Command:
              [Phenology].Vernalisation.VernSens = 5.0
              [Phenology].Vernalisation.PhotopSens = 3.0
          Cultivar BattenWinter
            Command:
              [Phenology].Vernalisation.VernSens = 3.0
              [Phenology].Vernalisation.PhotopSens = 5.0
          Cultivar BattenSpring
            Command:
              [Phenology].Vernalisation.VernSens = 1
              [Phenology].Vernalisation.PhotopSens = 5
          Cultivar Centaur
            Command:
              [Phenology].Vernalisation.VernSens = 5.0
              [Phenology].Vernalisation.PhotopSens = 4.0
          Cultivar Claire
            Command:
              [Phenology].Vernalisation.VernSens = 3.0
              [Phenology].Vernalisation.PhotopSens = 5.0
          Cultivar Conquest
            Command:
              [Phenology].Vernalisation.VernSens = 1.0
              [Phenology].Vernalisation.PhotopSens = 5.0
          Cultivar Einstein
            Command:
              [Phenology].Vernalisation.VernSens = 5.0
              [Phenology].Vernalisation.PhotopSens = 4.0
          Cultivar Exceed
            Command:
              [Phenology].Vernalisation.VernSens = 5.0
              [Phenology].Vernalisation.PhotopSens = 4.0
          Cultivar Majestic
            Command:
              [Phenology].Vernalisation.VernSens = 1.0
              [Phenology].Vernalisation.PhotopSens = 5.0
          Cultivar Option
            Command:
              [Phenology].Vernalisation.VernSens = 4.0
              [Phenology].Vernalisation.PhotopSens = 5.0
          Cultivar Otane
            Command:
              [Phenology].Vernalisation.VernSens = 1.0
              [Phenology].Vernalisation.PhotopSens = 3.0
          Cultivar Pennant
            Command:
              [Phenology].Vernalisation.VernSens = 5.0
              [Phenology].Vernalisation.PhotopSens  = 3.0
          Cultivar Regency
            Command:
              [Phenology].Vernalisation.VernSens = 5.0
              [Phenology].Vernalisation.PhotopSens = 5.0
          Cultivar Richmond
            Command:
              [Phenology].Vernalisation.VernSens = 5.0
              [Phenology].Vernalisation.PhotopSens = 4.0
          Cultivar Robigus
            Command:
              [Phenology].Vernalisation.VernSens = 3.0
              [Phenology].Vernalisation.PhotopSens = 5.0
          Cultivar Rongotea
            Command:
              [Phenology].Vernalisation.VernSens = 2.0
              [Phenology].Vernalisation.PhotopSens = 4.0
          Cultivar Rubric
            Command:
              [Phenology].Vernalisation.VernSens = 1.0
              [Phenology].Vernalisation.PhotopSens = 4.0
          Cultivar Sage
            Command:
              [Phenology].Vernalisation.VernSens = 1.0
              [Phenology].Vernalisation.PhotopSens = 5.0
          Cultivar Saracen
            Command:
              [Phenology].Vernalisation.VernSens = 2.0
              [Phenology].Vernalisation.PhotopSens = 5.0
          Cultivar Savannah
            Command:
              [Phenology].Vernalisation.VernSens = 5.0
              [Phenology].Vernalisation.PhotopSens = 4.0
          Cultivar Solstice
            Command:
              [Phenology].Vernalisation.VernSens = 5.0
              [Phenology].Vernalisation.PhotopSens = 3.0
          Cultivar Tanker
            Command:
              [Phenology].Vernalisation.VernSens = 5.0
              [Phenology].Vernalisation.PhotopSens = 4.0
          Cultivar Tribute
            Command:
              [Phenology].Vernalisation.VernSens = 1.0
              [Phenology].Vernalisation.PhotopSens = 4.0
          Cultivar Wakanui
            Command:
              [Phenology].Vernalisation.VernSens = 5.0
              [Phenology].Vernalisation.PhotopSens = 4.0
              [Structure].MainStemNodeAppearanceRate.BasePhyllochron.Value = 120
              [Leaf].ExtinctionCoeff.PotentialExtinctionCoeff.XYPairs.Y = 0.9,0.9
              [Phenology].EarlyReproductive.Target.Multiplier.Value = 5
              [Leaf].CohortParameters.SpecificLeafAreaMin.XYPairs.Y = 1000,1000
          Cultivar Weston
            Command:
              [Phenology].Vernalisation.VernSens = 5.0
              [Phenology].Vernalisation.PhotopSens = 4.0
        CultivarFolder Australia
          Cultivar GattonHartog
            Command:
              [Phenology].Vernalisation.VernSens = 2.5
              [Phenology].Vernalisation.PhotopSens = 3.5
          Cultivar h45
            Command:
              [Phenology].Vernalisation.VernSens = 1.5
              [Phenology].Vernalisation.PhotopSens = 1.5
          Cultivar Hartog
            Command:
              [Phenology].Vernalisation.VernSens = 1.5
              [Phenology].Vernalisation.PhotopSens = 3.0
          Cultivar Suntop
            Command:
              [Phenology].Vernalisation.VernSens = 1.5
              [Phenology].Vernalisation.PhotopSens = 3.0
          Cultivar Gamenya
            Command:
              [Phenology].Vernalisation.VernSens = 1.6
              [Phenology].Vernalisation.PhotopSens = 2.0
          Cultivar Spear
            Command:
              [Phenology].Vernalisation.VernSens = 1.5
              [Phenology].Vernalisation.PhotopSens = 3.5
              [Grain].MaximumPotentialGrainSize.Value = 1
              [Phenology].GrainFilling.Target.Value = 580
          Cultivar Gutha
            Command:
              [Phenology].Vernalisation.VernSens = 1.5
              [Phenology].Vernalisation.PhotopSens = 3.0
          Cultivar Wilgoyne
            Command:
              [Phenology].Vernalisation.VernSens = 1.4
              [Phenology].Vernalisation.PhotopSens = 1.8
              [Grain].MaximumPotentialGrainSize.Value = 1
              [Phenology].GrainFilling.Target.Value = 580
          Cultivar Bolac
            Command:
              [Phenology].Vernalisation.VernSens = 2.5
              [Phenology].Vernalisation.PhotopSens = 4.0
          Cultivar EGAGregory
            Command:
              [Phenology].Vernalisation.VernSens = 2.1
              [Phenology].Vernalisation.PhotopSens = 3.0
          Cultivar Kelallac
            Command:
              [Phenology].Vernalisation.VernSens = 2.5
              [Phenology].Vernalisation.PhotopSens = 4.0
          Cultivar MacKellar
            Command:
              [Phenology].Vernalisation.VernSens = 5.0
              [Phenology].Vernalisation.PhotopSens = 4.0
          Cultivar Kennedy
            Command:
              [Phenology].Vernalisation.VernSens = 2.5
              [Phenology].Vernalisation.PhotopSens = 4.0
          Cultivar Derrimut
            Command:
              [Phenology].Vernalisation.VernSens = 1.5
              [Phenology].Vernalisation.PhotopSens = 3.5
          Cultivar Janz
            Command:
              [Phenology].Vernalisation.VernSens = 1.5
              [Phenology].Vernalisation.PhotopSens = 3.5
          Cultivar Gladius
            Command:
              [Phenology].Vernalisation.VernSens = 1.5
              [Phenology].Vernalisation.PhotopSens = 3.0
          Cultivar Ventura
            Command:
              [Phenology].Vernalisation.VernSens = 1.5
              [Phenology].Vernalisation.PhotopSens = 3.0
          Cultivar Young
            Command:
              [Phenology].Vernalisation.VernSens = 2.3
              [Phenology].Vernalisation.PhotopSens = 3.2
          Cultivar Yitpi
            Command:
              [Phenology].Vernalisation.VernSens = 1.5
              [Phenology].Vernalisation.PhotopSens = 3.0
          Cultivar Ruby
            Command:
              [Phenology].Vernalisation.VernSens = 2.3
              [Phenology].Vernalisation.PhotopSens = 3.2
          Cultivar Wyalkatchem
            Command:
              [Phenology].Vernalisation.VernSens = 2.3
              [Phenology].Vernalisation.PhotopSens = 3.2
          Cultivar Wedgetail
            Command:
              [Phenology].Vernalisation.VernSens = 3.9
              [Phenology].Vernalisation.PhotopSens = 3.9
          Cultivar H46
            Command:
              [Phenology].Vernalisation.VernSens = 1.5
              [Phenology].Vernalisation.PhotopSens = 1.5
          Cultivar Mercury
            Command:
              [Phenology].Vernalisation.VernSens = 1.5
              [Phenology].Vernalisation.PhotopSens = 2.5
          Cultivar Gregory
            Command:
              [Phenology].Vernalisation.VernSens = 2.7
              [Phenology].Vernalisation.PhotopSens = 3.2
          Cultivar Livingston
            Command:
              [Phenology].Vernalisation.VernSens = 2.3
              [Phenology].Vernalisation.PhotopSens = 3.2
          Cultivar Lorikeet
            Command:
              [Phenology].Vernalisation.VernSens = 2.0
              [Phenology].Vernalisation.PhotopSens = 4.0
          Cultivar Lang
            Command:
              [Phenology].Vernalisation.VernSens = 1
              [Phenology].Vernalisation.PhotopSens = 4
          Cultivar McCubbin
            Command:
              [Phenology].Vernalisation.VernSens = 1
              [Phenology].Vernalisation.PhotopSens = 5
          Cultivar Sunco
            Command:
              [Phenology].Vernalisation.VernSens = 1
              [Phenology].Vernalisation.PhotopSens = 4
        CultivarFolder Turkey
          Cultivar Konya
            Command:
              [Phenology].Vernalisation.VernSens = 2.7
              [Phenology].Vernalisation.PhotopSens = 3.2
              [Grain].NumberFunction.GrainsPerStem.Value = 20
              [Grain].MaximumPotentialGrainSize.Value = 0.050
        CultivarFolder China
          Cultivar Keyu13
            Command:
              [Phenology].Vernalisation.VernSens = 5
              [Phenology].Vernalisation.PhotopSens = 1
        CultivarFolder USA
          Cultivar Yecora
            Command:
              [Phenology].Vernalisation.VernSens = 1.5
              [Phenology].Vernalisation.PhotopSens = 2.0
        CultivarFolder Europe
          Cultivar Dekan
            Command:
              [Phenology].Vernalisation.VernSens = 5.0
              [Phenology].Vernalisation.PhotopSens = 3.0
          Cultivar Rosario
            Command:
              [Phenology].Vernalisation.VernSens = 5.0
              [Phenology].Vernalisation.PhotopSens = 3.0
          Cultivar Ararat
            Command:
              [Phenology].Vernalisation.VernSens = 5.0
              [Phenology].Vernalisation.PhotopSens = 3.0
        CultivarFolder Africa
          Cultivar HAR1685
            Command:
              [Phenology].Vernalisation.VernSens = 1.5
              [Phenology].Vernalisation.PhotopSens = 2.0
              [Phenology].GrainFilling.Target.Value = 400
    Report: EventNames=[Clock].DoReport
      VariableNames:
        [Clock].Today
        Wheat.Phenology.DaysAfterSowing
        Wheat.Phenology.ThermalTime.Value as Wheat.Phenology.ThermalTime
        Wheat.Phenology.AccumulateThermalTime.Value as Wheat.Phenology.AccumulateThermalTime
        Wheat.Phenology.CurrentPhaseName
        Wheat.Phenology.CurrentStageName
        Wheat.Phenology.Stage
        Wheat.Structure.LeafTipsAppeared
        Wheat.Structure.PlantTotalNodeNo
        Wheat.Structure.InitialiseStage
        Wheat.Structure.MainStemFinalNodeNumber
        Wheat.Structure.BranchNumber
        Wheat.Structure.RemainingNodeNo
        Wheat.Structure.DeltaNodeNumber
        Wheat.Structure.ProportionBranchMortality
        Wheat.Structure.ProportionPlantMortality
        Wheat.Structure.BranchingRate.Value as Wheat.Structure.BranchingRate
        Wheat.Structure.BranchMortality.Value as Wheat.Structure.BranchMortality
        Wheat.Structure.PrimaryBudNo
        Wheat.Structure.PrimaryBudTotalNodeNo
        Wheat.Structure.MainStemPopn
        Wheat.Structure.TotalStemPopn
        Wheat.Structure.PlantTotalNodeNo
        Wheat.Structure.MeanTillerGrowthRate.Value as Wheat.Structure.MeanTillerGrowthRate
        Wheat.Structure.RelativeNodeApperance
        Wheat.Arbitrator.FN
        Wheat.Arbitrator.DMSupply
        Wheat.Leaf.CohortAge[1:11]
        Wheat.Leaf.MaxLeafArea[1:11]
        Wheat.Leaf.CohortArea[1:11]
        Wheat.Leaf.CohortSize[1:11]
        Wheat.Leaf.CohortSLA[1:11]
        Wheat.Leaf.CohortLagDuration[1:11]
        Wheat.Leaf.CohortGrowthDuration[1:11]
        Wheat.Leaf.CohortDeltaWaterConstrainedArea[1:11]
        Wheat.Leaf.CohortDeltaCarbonConstrainedArea[1:11]
        Wheat.Leaf.CohortLivePopulation[1:11]
        Wheat.Leaf.AppearedCohortNo
        Wheat.Leaf.InitialisedCohortNo
        Wheat.Leaf.ExpandingCohortNo
        Wheat.Leaf.GreenCohortNo
        Wheat.Leaf.SenescingCohortNo
        Wheat.Leaf.DeadCohortNo
        Wheat.Leaf.ExpandedCohortNo
        Wheat.Leaf.PlantAppearedGreenLeafNo
        Wheat.Leaf.PlantAppearedLeafNo
        Wheat.Leaf.PlantsenescedLeafNo
        Wheat.Leaf.FinalLeafFraction
        Wheat.Leaf.LAI
        Wheat.Leaf.LAIDead
        Wheat.Leaf.LAITotal
        Wheat.Leaf.CoverDead
        Wheat.Leaf.CoverGreen
        Wheat.Leaf.CoverTotal
        Wheat.Leaf.CohortLive.Wt as Wheat.Leaf.LiveWeight
        Wheat.Leaf.CohortDead.Wt as Wheat.Leaf.DeadWeight
        Wheat.Leaf.SpecificArea
        Wheat.Leaf.Fn
        Wheat.WaterSupplyDemandRatio
        Wheat.Leaf.CohortParameters.LeafRankAfterTerminalSpikelet.Value
        Wheat.Leaf.CohortParameters.LeafNumberAtTerminalSpikelet.Value
        Wheat.Grain.Number
        Wheat.Grain.Size
        Wheat.Grain.FSize
        Wheat.Grain.LiveFWt
        Wheat.Grain.Wt
        Wheat.Grain.DMDemandFunction.Value as Wheat.Grain.DMDemandFunction
  DataStore
  Experiment 15TraitMod
    Factors
      Factor Cultivar: Specifications=[Sowing]
        Operations hartog
          2015-05-21  [wheat].Sow(cultivar:"hartog", population:150, depth:40, rowSpacing:250);
    Simulation 15TraitMod: Area=0; Slope=0
      Weather: FileName=gatton-15-g3.met
      Clock: StartDate=2015-05-19; EndDate=2015-11-17T01:00:00
      Summary
      SoilArbitrator
      Zone Field: Area=0; Slope=0
        Irrigation
        Fertiliser
        Soil: SoilType=Black Vertosol; Site=Lawes; NearestTown=Lawes, Q 4343; Region=Lockyer; State=Queensland; Country=Australia; NaturalVegetation=Blue Gum, Moreton Bay Ash, Tea Tree; ApsoilNumber=38; Latitude=-27.537; Longitude=152.336; LocationAccuracy=+-20m; DataSource=CSIRO Sustainable Ecosystems, Toowoomba
          Comments=Soil naming structure: \State\Region\Classification-Local Name (Site/district and locator number); oc and ph estimated
          Water
            Thickness  BD    AirDry  LL15  DUL   SAT
            150        1.32  0.13    0.26  0.41  0.47
            150        1.3   0.208   0.26  0.43  0.48
            300        1.23  0.26    0.26  0.46  0.51
            300        1.27  0.26    0.26  0.44  0.49
            300        1.37  0.25    0.25  0.4   0.45
            300        1.35  0.26    0.26  0.41  0.46
            300        1.35  0.26    0.26  0.38  0.46
            SoilCrop WheatSoil: LL=[0.26, 0.26, 0.26, 0.26, 0.25, 0.29, 0.36]; KL=[0.06, 0.06, 0.06, 0.04, 0.04, 0.02, 0.02]; XF=[1, 1, 1, 1, 1, 1, 1]
          SoilWater: SummerDate=1-Nov; SummerU=6; SummerCona=3.5; WinterDate=1-Apr; WinterU=4; WinterCona=2.5; DiffusConst=40; DiffusSlope=16; Salb=0.12; CN2Bare=73; CNRed=20; CNCov=0.8; max_pond=0; Thickness=[150, 150, 300, 300, 300, 300, 300]; SWCON=[0.3, 0.3, 0.3, 0.3, 0.3, 0.3, 0.3]; residueinterception=0
          SoilNitrogen: fom_type=[default, manure, mucuna, lablab, shemp, stable]; fract_carb=[0.2, 0.3, 0.54, 0.57, 0.45, 0]; fract_cell=[0.7, 0.3, 0.37, 0.37, 0.47, 0.1]; fract_lign=[0.1, 0.4, 0.09, 0.06, 0.08, 0.9]; wfpsN2N2O_x=[22, 88]; wfpsN2N2O_y=[0.1, 1]
          SoilOrganicMatter: RootCN=40; RootWt=1000; SoilCN=12; EnrACoeff=7.4; EnrBCoeff=0.2; OCUnits=Total
            Thickness  OC        FBiom  FInert
            150        0.953846  0.04   0.4
            150        0.953846  0.02   0.6
            300        0.961538  0.02   0.8
            300        0.846154  0.02   1
            300        0.546154  0.01   1
            300        0.261538  0.01   1
            300        0.2       0.01   1
          Analysis: Thickness=[150, 150, 300, 300, 300, 300, 300]; PH=[8, 8, 8, 8, 8, 8, 8]; PHUnits=Water; BoronUnits=HotWater
          InitialWater: PercentMethod=FilledFromTop; FractionFull=1; RelativeTo=LL15
          Sample Initial nitrogen: NO3Units=kgha; NH4Units=kgha; SWUnits=Volumetric; OCUnits=Total; PHUnits=Water
            Thickness  NO3  NH4
            200        20   1
            1800       12   1
        SurfaceOrganicMatter: PoolName=wheat_stubble; type=Wheat; mass=0; standing_fraction=0; cpr=0; cnr=80; CriticalResidueWeight=2000; OptimumDecompTemp=20; MaxCumulativeEOS=20; CNRatioDecompCoeff=0.277; CNRatioDecompThreshold=25; TotalLeachRain=25; MinRainToLeach=10; CriticalMinimumOrganicC=0.004; DefaultCPRatio=0; DefaultStandingFraction=0; StandingExtinctCoeff=0.5; FractionFaecesAdded=0.5
          Pools:
            {PoolName=wheat_stubble, ResidueType=Wheat, Mass=0, CNRatio=80, CPRatio=0, StandingFraction=0}
          ResidueTypes: LoadFromResource=ResidueTypes
        Plant wheat: CropType=Wheat
        Operations Sowing
          2015-05-21  [wheat].Sow(cultivar:"hartog", population:150, depth:40, rowSpacing:250);
        MicroClimate: a_interception=0; b_interception=1; c_interception=0; d_interception=0; soil_albedo=0.3; air_pressure=1010; soil_emissivity=0.96; sun_angle=15; soil_heat_flux_fraction=0.4; night_interception_fraction=0.5; windspeed_default=3; refheight=2; albedo=0.15; emissivity=0.96; gsmax=0.01; r50=200
        Operations Management
          2015-05-21  [Fertiliser].Apply(Amount: 205, Type: Fertiliser.Types.Urea);
          2015-05-22  [Irrigation].Apply(amount:24);
          2015-06-26  [Irrigation].Apply(amount:25);
          2015-07-14  [Irrigation].Apply(amount:26);
          2015-07-31  [Irrigation].Apply(amount:26);
          2015-08-14  [Irrigation].Apply(amount:25);
          2015-08-26  [Irrigation].Apply(amount:25);
          2015-09-09  [Irrigation].Apply(amount:25);
        Report: EventNames=[Clock].DoReport
          VariableNames:
            [Clock].Today
            Wheat.Phenology.DaysAfterSowing
            Wheat.Phenology.ThermalTime.Value as Wheat.Phenology.ThermalTime
            Wheat.Phenology.AccumulateThermalTime.Value as Wheat.Phenology.AccumulateThermalTime
            Wheat.Phenology.CurrentPhaseName
            Wheat.Phenology.CurrentStageName
            Wheat.Phenology.Stage
            Wheat.Structure.MainStemPrimordiaNo
            Wheat.Structure.MainStemNodeNo
            Wheat.Structure.PlantTotalNodeNo
            Wheat.Structure.InitialiseStage
            Wheat.Structure.MainStemFinalNodeNumber
            Wheat.Structure.BranchNumber
            Wheat.Structure.RemainingNodeNo
            Wheat.Structure.DeltaNodeNumber
            Wheat.Structure.ProportionBranchMortality
            Wheat.Structure.ProportionPlantMortality
            Wheat.Structure.BranchingRate.Value as Wheat.Structure.BranchingRate
            Wheat.Structure.BranchMortality.Value as Wheat.Structure.BranchMortality
            Wheat.Structure.PrimaryBudNo
            Wheat.Structure.PrimaryBudTotalNodeNo
            Wheat.Structure.MainStemPopn
            Wheat.Structure.TotalStemPopn
            Wheat.Structure.PlantTotalNodeNo
            Wheat.Structure.MeanTillerGrowthRate.Value as Wheat.Structure.MeanTillerGrowthRate
            Wheat.Structure.RelativeNodeApperance
            Wheat.Arbitrator.FN
            Wheat.Arbitrator.DMSupply
            Wheat.Leaf.CohortAge[1:11]
            Wheat.Leaf.MaxLeafArea[1:11]
            Wheat.Leaf.CohortArea[1:11]
            Wheat.Leaf.CohortSize[1:11]
            Wheat.Leaf.CohortSLA[1:11]
            Wheat.Leaf.CohortLagDuration[1:11]
            Wheat.Leaf.CohortGrowthDuration[1:11]
            Wheat.Leaf.CohortDeltaWaterConstrainedArea[1:11]
            Wheat.Leaf.CohortDeltaCarbonConstrainedArea[1:11]
            Wheat.Leaf.CohortLivePopulation[1:11]
            Wheat.Leaf.AppearedCohortNo
            Wheat.Leaf.InitialisedCohortNo
            Wheat.Leaf.ExpandingCohortNo
            Wheat.Leaf.GreenCohortNo
            Wheat.Leaf.SenescingCohortNo
            Wheat.Leaf.DeadCohortNo
            Wheat.Leaf.ExpandedCohortNo
            Wheat.Leaf.PlantAppearedGreenLeafNo
            Wheat.Leaf.PlantAppearedLeafNo
            Wheat.Leaf.PlantsenescedLeafNo
            Wheat.Leaf.FinalLeafFraction
            Wheat.Leaf.LAI
            Wheat.Leaf.LAIDead
            Wheat.Leaf.LAITotal
            Wheat.Leaf.CoverDead
            Wheat.Leaf.CoverGreen
            Wheat.Leaf.CoverTotal
            Wheat.Leaf.CohortLive.Wt as Wheat.Leaf.LiveWeight
            Wheat.Leaf.CohortDead.Wt as Wheat.Leaf.DeadWeight
            Wheat.Leaf.SpecificArea
            Wheat.Leaf.Fn
            Wheat.WaterSupplyDemandRatio
            Wheat.Leaf.CohortParameters.LeafRankAfterTerminalSpikelet.Value
            Wheat.Leaf.CohortParameters.LeafNumberAtTerminalSpikelet.Value
